# В пакете Mathcad построить изображение пирамиды без удаления невидимых граней. Построенный рисунок должен моделировать изображение пирамиды в прямоугольной области окна Windows.
# (x, y) = (200, 100) – оконные координаты левого верхнего угла области
# (x, y) = (700, 500) – оконные координаты правго нижнего угла области
# (r, ϕ, θ) = (10, 315, 45) – положение камеры
# Читаем из файлов параметры пирамиды и положение камеры
filename := "4_1_Piramida.txt"
filename1 := "4_1_Camera.txt"
PIR1 := READFILE(filename, "delimited")
PV1 := READFILE(filename1, "delimited")
PIR1 = [
    "A", "B", "C", "D", "E", "F";
    0, 0, 3, 0, 0, 1;
    3, 0, 0, 1, 0, 0;
    0, 0, 0, 3, 3, 3;
    1, 1, 1, 1, 1, 1
]
PV1 = ["r=", 10; "fi=", 315; "theta=", 45]
A := transpose([0, 3, 0, 1])
D := transpose([0, 1, 3, 1])
B := transpose([0, 0, 0, 1])
E := transpose([0, 0, 3, 1])
C := transpose([3, 0, 0, 1])
F := transpose([1, 0, 3, 1])
# Формируем матрицу вершин пирамиды без заголовков
PIR := submatrix(PIR1, 1, 4, 0, 5)
PIR = [0, 0, 3, 0, 0, 1; 3, 0, 0, 1, 0, 0; 0, 0, 0, 3, 3, 3; 1, 1, 1, 1, 1, 1]
# Получаем сферические координаты точки наблюдения(углы в градусах)
PV := submatrix(PV1, 0, 2, 1, 1)
transpose(PV) = [10, 315, 45]
r_v := PV[0]
ϕ_v := PV[1]*π/180
θ_v := PV[2]*π/180
# Задаем положение секужей плоскости в МСК XYZ
# -угол между осью z и вектором нормали к секущей плоскости
ψ_grad := 50
ψ := ψ_grad/180*π
ψ = 0.872665
# - вектор нормали к секущей плоскости
N := transpose([0, sin(ψ), cos(ψ)])
# - координаты точки пересечения оси Z и секущей плоскости
x_0 := 0
y_0 := 0
z_0 := 3/4*PIR[:, 3][2]
z_0 = 2.25
# Задаем параметры уравнения секущей плоскости
[A; B; C] := N
[A; B; C] = [0; 0.766044; 0.642788]
D := -(A*x_0 + B*y_0 + C*z_0)
D = -1.44627
# Находим точку пересечения P1 секущей плоскости с ребром AD
V1 := submatrix(PIR1, 1, 3, 0, 0)
V2 := submatrix(PIR1, 1, 3, 3, 3)
transpose(V2) = [0, 1, 3]
transpose(V1) = [0, 3, 0]
ΔV := V2 - V1
ΔV = [0; -2; 3]
D = -1.44627
t_AD1 := -((N*V2 + D)/(N*ΔV))
N = [0; 0.766044; 0.642788]
t_AD := 0.3
V_AD := V1 + ΔV*t_AD
V_AD = [0; 2.4; 0.9]
x_AD := V_AD[0]
y_AD := V_AD[1]
z_AD := V_AD[2]
x_AD = 0
y_AD = 2.4
z_AD = 0.9
# Находим точку пересечения P1 секущей плоскости с ребром CF
V1 := submatrix(PIR1, 1, 3, 2, 2)
V2 := submatrix(PIR1, 1, 3, 5, 5)
ΔV := V2 - V1
transpose(V1) = [3, 0, 0]
ΔV = [-2; 0; 3]
t_CF := -((N*V1 + D)/(N*ΔV))
transpose(V2) = [1, 0, 3]
V_CF := V1 + ΔV*t_CF
t_CF = 0.75
x_CF := V_CF[0]
y_CF := V_CF[1]
z_CF := V_CF[2]
# Находим точку пересечения P1 секущей плоскости с ребром BE
V1 := submatrix(PIR1, 1, 3, 1, 1)
V2 := submatrix(PIR1, 1, 3, 4, 4)
ΔV := V2 - V1
ΔV = [0; 0; 3]
t_BE := -((N*V1 + D)/(N*ΔV))
t_BE = 0.75
V_BE := V1 + ΔV*t_BE
x_BE := V_BE[0]
y_BE := V_BE[1]
z_BE := V_BE[2]
# Получаем матрицу мировых коорднат точек P1, P2, P3
TR := [x_AD, x_CF, x_BE; y_AD, y_CF, y_BE; z_AD, z_CF, z_BE; 1, 1, 1]
# Задаем область отображения графика в окне Windows
x_LW := 100
y_LW := 200  # – левый верхний угол области отображения
x_HW := 800
y_HW := 900  # – правый нижний угол области отображения
# Формируем матрицу пересчета мировых координат в видовые
K_view := [
    -sin(ϕ_v), cos(ϕ_v), 0, 0;
    -cos(θ_v)*cos(ϕ_v), -cos(θ_v)*sin(ϕ_v), sin(θ_v), 0;
    -sin(θ_v)*cos(ϕ_v), -sin(θ_v)*sin(ϕ_v), -cos(θ_v), r_v;
    0, 0, 0, 1
]
# Вычисляем координаты вершин пирамиды в видовой системе координат (ВСК)
PIR_V := K_view*PIR
# Вычисляем координаты вершин треугольника сечения Р1,
# Р2, Р3 в видовой системе координат (ВСК)
TR_V := K_view*TR
# Определяем координаты проекции вершин пирамиды на картинную плоскость
P_XY := stack(transpose(transpose(PIR_V)[:, 0]), transpose(transpose(PIR_V)[:, 1]), transpose(transpose(PIR_V)[:, 3]))
# Определяем координаты проекции вершин треугольника сечения Р1,
# Р2, Р3 на картинную плоскость
TR_XY := stack(transpose(transpose(TR_V)[:, 0]), transpose(transpose(TR_V)[:, 1]), transpose(transpose(TR_V)[:, 3]))
# Определяем габаритную область проекции пирамиды на плоскость XY ВСК – картинную плоскость
x_L := min(transpose(P_XY)[:, 0])
y_H := max(transpose(P_XY)[:, 1])
# – левый верхний угол
x_L = 0
y_H = 2.62132
x_H := max(transpose(P_XY)[:, 0])
y_L := min(transpose(P_XY)[:, 1])
# – правый нижний угол
x_H = 2.12132
y_L = -1.5
# Вычисляем параметры, необходимые для формирования матрицы пересчета координат из палоскости XY ВСК в ОК
Δx_W := x_HW - x_LW
Δx_W = 700
Δx := x_H - x_L
Δx = 2.12132
Δy_W := y_HW - y_LW
Δy_W = 700
Δy := y_H - y_L
Δy = 4.12132
k_x := Δx_W/Δx
k_x = 329.983
k_y := Δy_W/Δy
k_y = 169.848
T_SW := [k_x, 0, x_LW - k_x*x_L; 0, -k_y, y_HW + k_y*y_L; 0, 0, 1]  # – матрица пересчета из ВСК в ОК
# Вычисляем оконные координаты вершин пирамиды
M_W := T_SW*P_XY
[x_a, x_b, x_c, x_d, x_e, x_f; y_a, y_b, y_c, y_d, y_e, y_f; q, q, q, q, q, q] := vectorize(round(M_W))
# Формируем массивы координат X и Y для рисования пирамиды
X := transpose([x_a, x_b, x_c, x_a, x_d, x_e, x_b, x_e, x_f, x_c, x_f, x_d])
Y := -transpose([y_a, y_b, y_c, y_a, y_d, y_e, y_b, y_e, y_f, y_c, y_f, y_d])
# Вычисляем оконные координаты вершин
# треугольника сечения Р1, Р2, Р3
TR_W := T_SW*TR_XY
[x_p1, x_p2, x_p3; y_p1, y_p2, y_p3; q, q, q] := vectorize(round(TR_W))
# Формируем массивы координат Х и У для рисования
# сечеия пирамиды
XC := transpose([x_p1, x_p2, x_p3, x_p1])
YC := -transpose([y_p1, y_p2, y_p3, y_p1])
# Вычисляем декартовы координаты камеры (вектора,
# определяющего положение камеры)
R_C := [r_v*sin(θ_v)*cos(ϕ_v); r_v*sin(θ_v)*sin(ϕ_v); r_v*cos(θ_v)]
X1 := transpose([x_e, x_b, x_c, x_f, x_e, x_d, x_f, x_c, x_a, x_d])
Y = [-390; -645; -900; -390; -200; -285; -645; -285; -370; -900; -370; -200]
Y1 := -transpose([y_e, y_b, y_c, y_f, y_e, y_d, y_f, y_c, y_a, y_d])
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