# В пакете Mathcad построить изображение пирамиды без удаления невидимых граней. Построенный рисунок должен моделировать изображение пирамиды в прямоугольной области окна Windows.
# (x, y) = (200, 100) – оконные координаты левого верхнего угла области
# (x, y) = (700, 500) – оконные координаты правго нижнего угла области
# (r, ϕ, θ) = (10, 315, 45) – положение камеры
# Читаем из файлов параметры пирамиды и положение камеры
A := transpose([5, 0, 0, 1])
C := transpose([0, 5, 0, 1])
B := transpose([0, 0, 0, 1])
D := transpose([0, 0, 10, 1])
# Получаем сферические координаты точки наблюдения(углы в градусах)
r_v := 10
ϕ_v := 340
ϕ_v := ϕ_v*π/180
EEEEEEEEE := transpose([0, 0, 3, 1])
θ_v := 45
θ_v := θ_v*π/180
FFFFFFFFF := transpose([1, 0, 3, 1])
# Задаем область отображения графика в окне Windows
x_LW := 100
y_LW := 200  # – левый верхний угол области отображения
x_HW := 800
y_HW := 900  # – правый нижний угол области отображения
# Формируем матрицу координат
PIR := augment(A, B, C, D)
PIR = [5, 0, 0, 0; 0, 0, 5, 0; 0, 0, 0, 10; 1, 1, 1, 1]
# Формируем матрицу пересчета мировых координат в видовые
K_view := [
    -sin(ϕ_v), cos(ϕ_v), 0, 0;
    -cos(θ_v)*cos(ϕ_v), -cos(θ_v)*sin(ϕ_v), sin(θ_v), 0;
    -sin(θ_v)*cos(ϕ_v), -sin(θ_v)*sin(ϕ_v), -cos(θ_v), r_v;
    0, 0, 0, 1
]
# Вычисляем координаты вершин пирамиды в видовой системе координат (ВСК)
PIR_V := K_view*PIR
PIR_V = [1.7101, 0, 4.69846, 0; -3.32232, 0, 1.20922, 7.07107; 6.67768, 10, 11.2092, 2.92893; 1, 1, 1, 1]
# Определяем координаты проекции вершин пирамиды на картинную плоскость
XV := transpose(PIR_V)[:, 0]  # Вектор Х-координат
YV := transpose(PIR_V)[:, 1]  # Вектор У-координат
IV := transpose(PIR_V)[:, 3]  # Вектор из единиц
P_XY := stack(transpose(XV), transpose(YV), transpose(IV))
P_XY = [1.7101, 0, 4.69846, 0; -3.32232, 0, 1.20922, 7.07107; 1, 1, 1, 1]
# Определяем габаритную область проекции пирамиды на плоскость XY ВСК – картинную плоскость
x_L := min(XV)
y_H := max(YV)
# – левый верхний угол
x_L = 0
y_H = 7.07107
x_H := max(XV)
y_L := min(YV)
# – правый нижний угол
x_H = 4.69846
y_L = -3.32232
# Вычисляем параметры, необходимые для формирования матрицы пересчета координат из палоскости XY ВСК в ОК
Δx_W := x_HW - x_LW
Δx_W = 700
Δx := x_H - x_L
Δx = 4.69846
Δy_W := y_HW - y_LW
Δy_W = 700
Δy := y_H - y_L
Δy = 10.3934
k_x := Δx_W/Δx
k_x = 148.985
k_y := Δy_W/Δy
k_y = 67.3505
T_SW := [k_x, 0, x_LW - k_x*x_L; 0, -k_y, y_HW + k_y*y_L; 0, 0, 1]  # – матрица пересчета из ВСК в ОК
# Вычисляем оконные координаты вершин пирамиды
M1_W := T_SW*P_XY
M_W := vectorize(round(M1_W))
[x_a, x_b, x_c, x_d; y_a, y_b, y_c, y_d; q, q, q, q] := M_W
# Вычисляем декартовы координаты камеры (вектора,
# определяющего положение камеры)
R_C := [r_v*sin(θ_v)*cos(ϕ_v); r_v*sin(θ_v)*sin(ϕ_v); r_v*cos(θ_v)]
лор
# Вычисляем декартовы координаты вектора внешней
# нормали к каждой грани пирамиды
Y =  # error: This variable is undefined.
A := transpose([0, 3, 0, 1])
D := transpose([0, 1, 3, 1])
C := transpose([3, 0, 0, 1])
B := transpose([0, 0, 0, 1])
A_0 := 5
B_0 := 0
C_0 := 0
D_0 := 0
A_1 := 0
B_1 := 0
C_1 := 5
D_1 := 0
A_2 := 0
B_2 := 0
C_2 := 0
D_2 := 10
AC := [C_0; C_1; C_2] - [A_0; A_1; A_2]
AD := [D_0; D_1; D_2] - [A_0; A_1; A_2]
N_ADC := AC×AD
N_ADB := transpose([0, -1, 0])
N_BDC := transpose([-1, 0, 0])
N_ABC := transpose([0, 0, -1])
q1 := R_C*N_ADC
s1 := if(q1 ≥ 0, "Грань ADC видима", "Грань ADC невидима")
s1 = "Грань ADC видима"
AC := [C_0; C_1; C_2] - [A_0; A_1; A_2]
AB := [B_0; B_1; B_2] - [A_0; A_1; A_2]
q2 := R_C*N_ADB
s2 := if(q2 ≥ 0, "Грань ADB видима", "Грань ADB невидима")
AC := [C_0; C_1; C_2] - [A_0; A_1; A_2]
s2 = "Грань ADB видима"
BD := [D_0; D_1; D_2] - [B_0; B_1; B_2]
q3 := R_C*N_BDC
s3 := if(q3 ≥ 0, "Грань BDC видима", "Грань BDC невидима")
AC := [C_0; C_1; C_2] - [A_0; A_1; A_2]
AD := [D_0; D_1; D_2] - [A_0; A_1; A_2]
s3 = "Грань BDC невидима"
q4 := R_C*N_BDC
s4 := if(q4 ≥ 0, "Грань ABC видима", "Грань ABC невидима")
s4 = "Грань ABC невидима"
X := transpose([x_a, x_d, x_c, x_a, x_b, x_d])
Y := -transpose([y_a, y_d, y_c, y_a, y_b, y_d])
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